π[1] := 0.4
π[2] := 0.4
ρ := 0.5
P000 := 0
P001 := 0
P010 := 0
P110 := 0
P011 := 0
P111 := 0
P211 := 0
P210 := 0
Given
ρ*P000 + ρ*(1 - π[2])*P001 - P000 == 0
ρ*π[1]*P010 + (1 - ρ)*P000 + (1 - ρ)*(1 - π[2])*P001 + ρ*π[1]*(1 - π[2])*P011 - P010 == 0
ρ*π[2]*P001 + ρ*(1 - π[1])*P010 + ρ*(1 - π[1])*P011 - P001 == 0
ρ*π[1]*P110 + (1 - ρ)*π[1]*P010 + (1 - ρ)*π[1]*(1 - π[2])*P011 + ρ*π[1]*(1 - π[2])*P111 - P110 == 0
ρ*π[1]*π[2]*P011 + (1 - ρ)*(1 - π[1])*P011 + (1 - ρ)*π[2]*P001 + (1 - ρ)*(1 - π[1])*P010 + ρ*(1 - π[1])*P110 + ρ*(1 - π[1])*P111 - P011 == 0
ρ*π[1]*π[2]*P111 + (1 - ρ)*(1 - π[1])*P111 + (1 - ρ)*π[1]*π[2]*P011 + (1 - ρ)*(1 - π[1])*P110 + ρ*(1 - π[1])*P211 + ρ*(1 - π[1])*P210 - P111 == 0
ρ*π[1]*π[2]*P211 + (1 - ρ)*(1 - π[1])*(1 - π[2])*P211 + (1 - ρ)*π[2]*P211 + (1 - ρ)*π[1]*π[2]*P111 + (1 - ρ)*(1 - π[1])*P210 - P211 == 0
ρ*π[1]*P210 + (1 - ρ)*π[1]*P210 + (1 - ρ)*π[1]*(1 - π[2])*P111 + π[1]*(1 - π[2])*P211 + (1 - ρ)*π[1]*P110 - P210 == 0
P000 + P001 + P010 + P110 + P011 + P111 + P211 + P210 == 1
[P000; P001; P010; P110; P011; P111; P211; P210] := Find(P000, P001, P010, P110, P011, P111, P211, P210) → [0.0829918032787; 0.138319672131; 0.138319672131; 0.0922131147541; 0.230532786885; 0.15368852459; 0.0731850117096; 0.0907494145199]
Pbl := 0
A := (P001 + P011 + P111 + P211)*(1 - π[2]) = 0.357436
Q := A/(1 - ρ) = 0.714871
Potk := 1 - Q = 0.285129
Loch := 1*(P110 + P111) + 2*(P210 + P211) = 0.57377
Lc := 1*(P010 + P001) + 2*(P110 + P011) + 3*(P210 + P111) + 4*P211 = 1.94819
Woch := Loch/((P110 + P111 + P210 + P211 + P010 + P011)*(1 - π[1])) = 1.22807
Wc := Woch + 1/(1 - π[1]) + 1/(1 - π[2]) = 4.5614
K1 := P010 + P110 + P210 + P011 + P111 + P211 = 0.778689
K2 := P001 + P011 + P111 + P211 = 0.595726
